P := 35*10^-3*bar
V_T := 400 mL
E := 210 GPa
d := 100 mm
S := π*d^2/4 = 7853.98 mm^2
Given
h := 3 cm
b := [0.1; 0.2; 0.3]*cm
h := 3 cm
I := h*b^3/12
l_1 := nthroot(3*E*I*V_T/(P*S^2), 3)
SOL := Find(l_1) = [14.29; 28.5799; 42.8699] cm
