# Var 2) Cilindru - piston - platbanda
E := 210 GPa
b := 1.5 mm  # grosime platbanda
h := 34.4 mm  # latime platbanda
d := 104 mm  # Diamentru interior cilindru
p := 35*10^-3*bar  # presiunea de intrare in cilindru
S := π*d^2/4 = 8494.87 mm^2  # suprafata interioara cilindru
I := h*b^3/12 = 9.675e-12 m^4  # moment inertie platbanda
w := p*S*l^3/(48*E*I)  # sageata platbanda
V := 450 mL  # volumul ce trebuie dislocuit
w := V/S = 52.9732 mm  # distanta parcursa de piston pt volumul ales
l_nec := nthroot(48*E*I*V/(p*S^2), 3) = 55.8017 cm  # lungimea necesara platbanda
mbar := 10^-3*bar
cmH2O := mbar
1*cmH2O = 1*1*mbar
(4 - 2.5)*L/(10*cmH2O) = 1.5e-6 m^5/N
P := 100*mL/cmH2O
P = 1e-6 m^5/N
